# In the case of usage cite:
# Kostiantyn Sakhatskiy,
# Vitalii Bartosh
# Kovalenko group
# D-CHAB, ETH Zurich
# Units & constants
eV := 1*V*e_c = 1.60218e-19 J
keV := 10^3*eV
MeV := 10^6*eV
mGy := 10^-3*Gy  # For convenience we define here photon in energy units, although we note that photon number itself is unitless
μGy := 10^-6*Gy
nGy := 10^-9*Gy
photon := 60000 eV
signal_units := 1*e_c
dose_units := 1 photon
p := 100*μm  # pixel pitch
detector_area := 100*100 μm^2
d := 1 mm  # thickness of the active layer
# File input
# Averaged (baseline) signal values:
Signal := READFILE("./Signal_CdTe_charge.txt", "delimited")*signal_units
# Corresponding to signal dose values:
Dose_signal := READFILE("./Dose_signal_CdTe_photons.txt", "delimited")*dose_units
# Noise RMS values:
Noise := READFILE("./Noise_CdTe_charge.txt", "delimited")*signal_units
# Corresponding to noise dose values:
Dose_noise := READFILE("./Dose_noise_CdTe_photons.txt", "delimited")*dose_units
# Linear attenuation coefficient in CdTe with 1mm thickness:
μ := READFILE("./u_CdTe_1mm.txt", "delimited")*cm^-1
# Energies for μ dependency:
E_μ := READFILE("./u_energy_CdTe_1mm.txt", "delimited")
# Pixel coordinates (in mm):
distance := READFILE("./Distance_CdTe.txt", "delimited")
# Edge spread function (from partially closed detector array):
ESF := READFILE("./Signal_profile_CdTe.txt", "delimited")
# Normalized transient signal values from the detector:
TS := READFILE("./Transient_signal_CdTe.txt", "delimited")
# Time for transient signal values from the detector:
T := READFILE("./Transient_signal_time_CdTe.txt", "delimited")*ns
# Single pixel characterization
# Linear fit of the signal to dose dependence:
[intercept_s; slope_s] := line(Dose_signal, Signal)
# dose range
S_D_fit(x) := intercept_s + slope_s*x
x_s := 0 photon, 0.1 photon .. 10000 photon
# [chart]
    X[1] := Dose_signal/photon
    Y[1] := Signal/e_c
    X[2] := x_s/photon
    Y[2] := S_D_fit(x_s)/e_c
# Signal vs dose dependence
# Detection Efficiency here can be determined using value of slope from fitting
slope_s = 0.203619 e_c/eV
# Its inverse value is effective electron-hole pair creation energy W
W_eff := 1/slope_s = 4.91113 eV/e_c
# Detection Efficiency is obtained by comparing effective W and intrinsic W for material (case of full X-ray absorption and charge extraction), which could be calculated following Klein rule:
# For bandgap of CdTe
ε_b := 1.5 eV
W_int := 14/5*ε_b/e_c + 0.606*eV/e_c = 4.806 eV/e_c
DE_1 := W_int/W_eff = 0.978594
# Conversion coefficient ("slope_s" parameter) also could be used further in noise analysis for another way of Detection Efficiency estimation.
# Noise analysis, DE, NED, DQE
E := 60 keV  # x-ray energy during measurement
μ_ρ_E_av := 60*3.041*10^-2 keV*cm^2/gm  # product of x-ray energy and mass energy transfer coefficient in air for 60 keV
# Linear fit of the noise to dose dependence:
[intercept_n; slope_n] := line(Dose_noise, Noise^2)
intercept__n := Noise[0]^2
# correction of the intercept
# (to exclude the overestimation of NED)
N_D_fit(x) := intercept__n + slope_n*x
x_n := 0 photon, 1 photon .. 10000 photon  # dose range
# [chart]
    Y[1] := Noise^2/e_c^2
    X[1] := Dose_noise/photon
    X[2] := x_n/photon
    Y[2] := N_D_fit(x_n)/e_c^2
# Squared noise vs dose dependence
# photon to dose converting function:
D(n) := μ_ρ_E_av*n/detector_area
D(1) = 0.00292333 μGy  # single photon dose
# To note, photon units are inserted to numerator to cancel out them in denominator since number of photons is anyway considered to be unitless.
DE_2 := photon*slope_s^2/slope_n = 0.983753
NED := intercept__n/slope_n = 0.00185139 photon
NED_dose := NED*D(1)/photon = 0.00541223 nGy
# Detective Quantum Efficiency (DQE)
Dose_n := 0 photon, 0.001*photon .. 10 photon  # dose range
DQE_D(D) := DE_2/(1 + NED/D)  # DQE dependence from the dose
# [chart]
    Y[1] := DQE_D(Dose_n)
    X[1] := Dose_n/photon
# Energy-dependent characteristics
# Cubic-spline fitting of X-ray linear attenuation coefficient vs. energy:
μ_CdTe(E) := interp(cspline(E_μ, μ), E_μ, μ, E)
E := 0, 0.1 .. E_μ[length(E_μ) - 1]
# Attenuation efficiency:
AE(E) := (1 - exp(-d*μ_CdTe(E)))
# [chart]
    X[1] := E
    Y[1] := AE(E)
    X[2] := E
    Y[2] := 0.5
# X-ray energy during measurement:
E_mes := 60  # keV
μ_mes := 36.1 cm^-1
AE_mes := (1 - exp(-d*μ_mes)) = 0.972948
DE_E(E) := DE_1*AE(E)/AE_mes
E_mes := 60
AE_50 := 110 keV
NED_E(E) := (E_mes/E)^2*AE_mes/AE(E)*NED
# [chart]
    X[1] := E
    Y[1] := DE_E(E)
# [chart]
    X[1] := E
    Y[1] := NED_E(E)/photon
n_ph := 1000*photon  # dose of 10^3 photons
DQE_E(E, n_ph) := DE_E(E)/(1 + NED_E(E)/n_ph)
NED_E(E_mes) = 1.78091e-17 J
DE_E(E_mes) = 0.977959
# [chart]
    Y[1] := DQE_E(E, 10*photon)
    X[1] := E
    Y[2] := DQE_E(E, 10^2*photon)
    X[2] := E
    Y[3] := DQE_E(E, 10^3*photon)
    X[3] := E
# Timing detector characterization
t := 0 ns, 0.1 ns .. 300 ns
# [chart]
    Y[1] := TS
    X[1] := T/10^-9
    Y[2] := 0.1
    X[2] := t/10^-9
    X[3] := t/10^-9
    Y[3] := 0.9
# Transient of single-photon counting event
t_rise := 87 ns
f_3dB := 0.35/t_rise = 4022989 Hz
# Array detector characterization
# [chart]
    X[1] := distance
    Y[1] := ESF
# Edge spread function (detector output)
# Linear spread function - derivative of the ESF(x)
i := 0, 1 .. length(ESF) - 2
LSF[i] := (ESF[i + 1] - ESF[i])/(distance[i + 1] - distance[i])
distance_LSF[i] := distance[i]
# Gaussian fitting:
# If regression doesn't converge, try to change "guess" parameters
guess := [90; 0.6; 0.1]
gauss(x, A, μ, σ) := A/(sqrt(2*π)*σ)*exp(-(x - μ)^2/(2*σ^2))
f(x, A, μ, σ) := [
    gauss(x, A, μ, σ);
    1/A*gauss(x, A, μ, σ);
    (x - μ)/σ^2*gauss(x, A, μ, σ);
    (x - μ)^2/σ^3*gauss(x, A, μ, σ)
]
Results := genfit(distance_LSF, LSF, guess, f) = [80.2247; 0.793008; 0.0356775]
# [chart]
    X[1] := distance
    Y[1] := LSF
    X[2] := distance
    Y[2] := gauss(distance, Results[0], Results[1], Results[2])
# Modulation transfer function
# Upper and lower limits in the integral below should be set according to distance
# points where "step" is observed
OTF(ξ) := integral(gauss(x, Results[0], Results[1], Results[2])*exp(-1i*2*π*ξ*x), x = 0.4 .. 1)
MTF(ξ) := |OTF(ξ)|/|OTF(0)|
ξ := 0, 0.1 .. 10
# [chart]
    Y[1] := MTF(ξ)
    X[1] := ξ
    Y[2] := 0.2
    X[2] := ξ
f_20 := 8  # lp/mm
# Noise power spectrum (NPS)
# For a photon-counting detector the NPS is independents on spatial frequency (Proc SPIE Int Soc Opt Eng. 2017 Feb; 10132: 1013207.) and
# for a single-particle counting detector normalized NPS is equal 1/DE (McMullan, G. et al. Electron imaging with Medipix2 hybrid pixel detector. Ultramicroscopy 107, 401–413 (2007).)
NNPS(f) := 1
# Detective Quantum Efficiency
# spatial frequency
u := 0*mm^-1, 0.1*mm^-1 .. 10*mm^-1
DQE(f) := DE_1*MTF(f/mm^-1)^2/NNPS(f)
DQE_th(f) := (sin(π*f*p)/(π*f*p))^2
# [chart]
    X[1] := u/mm^-1
    Y[1] := DQE(u)
    X[2] := u/mm^-1
    Y[2] := DQE_th(u)
n1 := (1 + sqrt(1 + 0.16*DE_1*NED/photon))/(0.08*DE_1*detector_area*(f_20*mm^-1)^2) = 39.9199
# Characterization Summary
# Detector parameters:
#
# Material: СdTe
# Geometry of readout channels: 2d array
# Conversion type: direct-conversion
# Detection mode: photon-counting
# Thickness: 1 mm
# Pixel area: 100x100 um^2
# Pixel pitch: 100 um
#
# X-ray beam conditions:
#
# Source:  radioactive isotope Am-241
# Distance: 10 cm away from the source
# Spectrum: monoenergetic (60 keV)
# Detectors performance parameters:
# Noise equivalent dose:
NED = 0.00185139 photon
NED_dose = 5.41223e-12 Gy
# Detector efficiency:
DE_1 = 0.978594
DE_2 = 0.983753
# X-ray energy at 50% absorption efficiency:
AE_50 = 110 keV
# Rise time and cut-off frequency:
t_rise = 87 ns
f_3dB = 4022989 Hz
# Spatial resolution:
f_20 = 8  # lp/mm
# Number of photons passing
# through the smallest resolvable
# feature to achieve SNR=1:
n1 = 39.9199
