# If used, please cite: "-" (TBA)
# Kostiantyn Sakhatskiy,
# Vitalii Bartosh
# Kovalenko group
# D-CHAB, ETH Zurich
# Units & constants
eV := 1*V*e_c = 1.60218e-19 J
keV := 10^3*eV
MeV := 10^6*eV
mGy := 10^-3*Gy
au := ¤
μGy := 10^-6*Gy
signal_units := 1 au
arbitary_units := au
dose_units := μGy
p := 130*μm  # pixel pitch
detector_area := 130*130 μm^2
d := 0.5 mm  # thickness of the active layer
f0(i, j) := 0
# File input
# Averaged (baseline) signal values:
Signal := READFILE("./Signal_GOS.txt", "delimited")*signal_units
# Corresponding to signal dose values:
Dose_signal := READFILE("./Dose_signal_GOS.txt", "delimited")*dose_units
# Noise RMS values:
Noise := READFILE("./Noise_GOS.txt", "delimited")*signal_units
# Corresponding to noise dose values:
Dose_noise := READFILE("./Dose_noise_GOS.txt", "delimited")*dose_units
# Linear attenuation coefficient in GOS:
μ := READFILE("./u_GOS.txt", "delimited")*cm^-1
# Energies for μ dependency:
E_μ := READFILE("./u_energy_GOS.txt", "delimited")
# Pixel coordinates (in mm):
distance := READFILE("./Distance_GOS_pixels_pos_III_pixels.txt", "delimited")*10^-3
# Edge spread function (from partially closed detector array):
ESF := READFILE("./Signal_profile_GOS_pos_III.txt", "delimited")
# Noise values from the detector:
Noise_matrix := READPRN("./Noise_2D_GOS.txt")
# Single pixel characterization
# Linear fit of the signal to dose dependence:
[intercept_s; slope_s] := line(Dose_signal, Signal)
# dose range
S_D_fit(x) := intercept_s + slope_s*x
x_s := 0 Gy, 0.000001 Gy .. 0.00004 Gy
# [chart]
    X[1] := Dose_signal*10^3
    Y[1] := Signal
    X[2] := x_s*10^3
    Y[2] := S_D_fit(x_s)
# Signal vs dose dependence
# Conversion coefficient ("slope_s" parameter) is used further in noise analysis for
# Detection Efficiency estimation.
# Detection Efficiency evaluation via comparison with sensitivity isn't applicable for scintillation (only suitable direct-converting detector in charge-integration mode)
# Noise analysis, DE, NED, DQE
E := 22 keV  # x-ray energy during measurement
μ_ρ_E_av := 10.16 keV*cm^2/gm  # product of x-ray energy and mass energy transfer coefficient in air, averaged on spectrum
# Linear fit of the noise to dose dependence:
[intercept_n; slope_n] := line(Dose_noise, Noise^2)
intercept__n := Noise[0]^2
# correction of the intercept
# (to exclude the overestimation of NED)
N_D_fit(x) := intercept__n + slope_n*x
x_n := 0 Gy, 0.000001 Gy .. 0.000032 Gy  # dose range
# [chart]
    Y[1] := Noise^2
    X[1] := Dose_noise*10^3
    X[2] := x_n*10^3
    Y[2] := N_D_fit(x_n)
# Squared noise vs dose dependence
# photon to dose converting function:
D(n) := μ_ρ_E_av*n/detector_area
D(1) = 0.00963202 μGy  # single photon per pixel dose
DE_2 := slope_s^2*D(1)/slope_n = 0.669787
D1 := 0.606*μGy
q := D1/μ_ρ_E_av = 3722.79 1/mm^2
NED := intercept__n/slope_n = 0.760845 μGy
NED_photon := NED/D(1) = 78.9912
# Detective Quantum Efficiency (DQE)
Dose_n := 0 Gy, 0.0000001 Gy .. 0.00032 Gy  # dose range
DQE_D(D) := DE_2/(1 + NED/D)  # DQE dependence from the dose
# [chart]
    Y[1] := DQE_D(Dose_n)
    X[1] := Dose_n*10^3
# Energy-dependent characteristics
# Cubic-spline fitting of X-ray linear attenuation coefficient vs. energy:
μ_GOS(E) := interp(cspline(E_μ, μ), E_μ, μ, E)
E := 0, 0.1 .. E_μ[length(E_μ) - 1]
# Attenuation efficiency:
AE(E) := (1 - exp(-d*μ_GOS(E)))
# [chart]
    X[1] := E
    Y[1] := AE(E)
    X[2] := E
    Y[2] := 0.5
# X-ray energy during measurement:
E_mes := 22  # keV
μ_mes := 183 cm^-1
AE_mes := (1 - exp(-d*μ_mes)) = 0.999894
DE_E(E) := DE_2*AE(E)/AE_mes
E_mes := 22
NED_E(E) := (E_mes/E)^2*AE_mes/AE(E)*NED_photon
AE_50 := 110 keV
NED_E(60) = 10.9634
# [chart]
    X[1] := E
    Y[1] := DE_E(E)
# [chart]
    X[1] := E
    Y[1] := NED_E(E)
n_ph := D(10^6) = 9.63202 mGy  # dose of 10^6 photons
DQE_E(E, n_ph) := DE_E(E)/(1 + NED_E(E)/n_ph)
# [chart]
    Y[1] := DQE_E(E, 10^4)
    X[1] := E
    Y[2] := DQE_E(E, 10^5)
    X[2] := E
    Y[3] := DQE_E(E, 10^6)
    X[3] := E
# Timing detector characterization
# For this case the detector speed is limited not by not scintillator but readout speed of imaging array, which is 1 frame per second, which mean
t_int := 1 s
# Using Eq. 16 and 19 it is possible to determine
t_rise := 0.7*t_int = 0.7 s
f_3dB := 0.35/t_rise = 0.5 Hz
# [chart]
    X[1] := distance
    Y[1] := ESF
# Array detector characterization
# Edge spread function (detector output)
# Linear spread function - derivative of the ESF
i := 0, 1 .. length(ESF) - 2
LSF[i] := (ESF[i + 1] - ESF[i])/(distance[i + 1] - distance[i])
distance_LSF[i] := distance[i]
# Gaussian fitting:
# If regression doesn't converge, try to change "guess" parameters
guess := [1000; 0.6; 0.1]
gauss(x, A, μ, σ) := A/(sqrt(2*π)*σ)*exp(-(x - μ)^2/(2*σ^2))
f(x, A, μ, σ) := [
    gauss(x, A, μ, σ);
    1/A*gauss(x, A, μ, σ);
    (x - μ)/σ^2*gauss(x, A, μ, σ);
    (x - μ)^2/σ^3*gauss(x, A, μ, σ)
]
Results := genfit(distance_LSF, LSF, guess, f) = [-2509.42; 0.980722; -0.083975]
# [chart]
    X[1] := distance
    Y[1] := LSF
    X[2] := distance
    Y[2] := gauss(distance, Results[0], Results[1], Results[2])
# Modulation transfer function
# Upper and lower limits in the integral below should be set according to distance
# points where "step" is observed
OTF(ξ) := integral(gauss(x, Results[0], Results[1], Results[2])*exp(-1i*2*π*ξ*x), x = 0.6 .. 1.3)
MTF(ξ) := |OTF(ξ)|/|OTF(0)|
ξ := 0, 0.1 .. 10
# [chart]
    Y[1] := MTF(ξ)
    X[1] := ξ
    Y[2] := 0.2
    X[2] := ξ
# Spatial resolution
f_20 := 3.5  # lp/mm
# [contour plot: Noise_matrix]
# Noise power spectrum (NPS)
A := rows(Noise_matrix) = 32
B := cols(Noise_matrix) = 32  # size of matrix
# Mean value of the noise:
Noise_avereged := 1/(A*B)*sum(sum(Noise_matrix[x, y], y = 0 .. B - 1), x = 0 .. A - 1) = 0.350222
# NPS calculation for 32 detector rows:
NPS(f, point) := p/B*|sum((Noise_matrix - Noise_avereged)[point, x]*exp((-1i*2*π)*(f*x*p)), x = 0 .. B - 1)|^2
# spatial frequency
u := 0*mm^-1, 0.1*mm^-1 .. 20*mm^-1
NPS_av(f) := sum(NPS(f, i), i = 0 .. A - 1)/A
Noise_matrix[0, 1] = 8.81773
# [chart]
    X[1] := u/mm^-1
    Y[1] := NPS_av(u)
NPS_av(0 mm^-1) = 15.2306 mm
# Normalized NPS:
NNPS(f) := NPS_av(f)/NPS_av(0*mm^-1)
# More NPS spectra are needed (more measured signals from the detector region of interest). Both quantity and size of the region of interest will approach the resulting NPS closer to a real form)
# Detective Quantum Efficiency
DQE(f) := DE_2*MTF(f/mm^-1)^2/NNPS(f)
DQE_th(f) := (sin(π*f*p)/(π*f*p))^2
# [chart]
    X[1] := u/mm^-1
    Y[1] := DQE(u)
    X[2] := u/mm^-1
    Y[2] := DQE_th(u)
# [chart]
    X[1] := u/mm^-1
    Y[1] := NNPS(u)
n1 := (1 + sqrt(1 + 0.16*DE_2*NED/D(1)))/(0.08*DE_2*detector_area*(f_20*mm^-1)^2) = 367.488
# Characterization Summary
# Detector parameters:
#
# Material: GdO2S2 (Tb)
# Geometry of readout channels: 2d array
# Conversion type: scintillation
# Detection mode: charge-integration
# Thickness: 500 um
# Pixel area: 130x130 um^2
# Pixel pitch: 130 um
#
# X-ray beam conditions:
#
# Source: Ag X-ray tube at 25 kVp
# Distance: 10 cm away from X-ray tube nozzle
# Spectrum: Quasi-monogenetic (mean 22 keV, width 2 keV)
# Detectors performance parameters:
# Noise equivalent dose:
NED_photon = 78.9912
NED = 0.760845 μGy
# Detector efficiency:
DE_2 = 0.669787
# X-ray energy at 50% absorption efficiency:
AE_50 = 110 keV
# Rise time and cut-off frequency:
t_rise = 0.7 s
f_3dB = 0.5 Hz
# Spatial resolution:
f_20 = 3.5  # lp/mm
# Number of photons passing
# through the smallest resolvable
# feature to achieve SNR=1:
n1 = 367.488
