# If used, please cite: "-" (TBA)
# Kostiantyn Sakhatskiy,
# Vitalii Bartosh
# Kovalenko group
# D-CHAB, ETH Zurich
# Units & constants
eV := 1*V*e_c = 1.60218e-19 J
keV := 10^3*eV
MeV := 10^6*eV
mGy := 10^-3*Gy
μGy := 10^-6*Gy
photon := 22 keV
nGy := 10^-9*Gy
signal_units := 1*e_c
dose_units := 1 μGy
p := 40*μm  # pixel pitch
detector_pixel_area := 40*1000 μm^2
d := 200 μm
# File input
# Averaged signal values:
Signal := READFILE("./Signal_MAPbI3_charge.txt", "delimited")*signal_units
# Corresponding to signal dose values:
Dose_signal := READFILE("./Dose_signal_MAPbI3_uGy.txt", "delimited")*dose_units
# Noise RMS values:
Noise := READFILE("./Noise_MAPbI3_charge.txt", "delimited")*signal_units
# Corresponding to noise dose values:
Dose_noise := READFILE("./Dose_noise_MAPbI3_uGy.txt", "delimited")*dose_units
# Linear attenuation coefficient in MAPbI3 with 200 um thickness:
μ := READFILE("./u_MAPbI3_200um.txt", "delimited")*cm^-1
# Energies for μ dependency:
E_μ := READFILE("./u_energy_MAPbI3_200um.txt", "delimited")
# Pixel coordinates (in mm):
distance := READFILE("./Distance_MAPbI3.txt", "delimited")
# Edge spread function (from partially closed detector array):
ESF := READFILE("./Signal_profile_MAPbI3.txt", "delimited")
# Normalized transient signal values from the detector:
TS := READFILE("./Transient_signal_MAPbI3.txt", "delimited")
# Time for transient signal values from the detector:
T := READFILE("./Transient_signal_time_MAPbI3.txt", "delimited")*μs
# Single pixel characterization
# Linear fit of the signal to dose dependence:
[intercept_s; slope_s] := line(Dose_signal, Signal)
# dose range
S_D_fit(x) := intercept_s + slope_s*x
x_s := 0 nGy, 1000 nGy .. 10000000 nGy
# [chart]
    X[1] := Dose_signal/10^-6
    Y[1] := Signal/e_c
    X[2] := x_s/10^-6
    Y[2] := S_D_fit(x_s)/e_c
# Signal vs dose dependence
# Detection Efficiency here can be determined using value of slope from fitting
slope_s = 0.103483 μC/Gy
# If normalize on pixel area, one can obtain effective X-ray sensitivity:
Sensitivity_eff := slope_s/detector_pixel_area = 258.706 μC/(cm^2*Gy)
# Detection Efficiency is obtained by comparing effective X-ray sensitivity and intrinsic X-ray sensitivity  for material (case of full X-ray absorption and charge extraction and no gain), which could be calculated for given X-ray energy and for  bandgap of MAPbI3 :
# for 22 keV
# for MAPbI3 bandgap
ε := 1.6 eV
u_ro_air := 0.7 cm^2/gm
W_int := 14/5*ε + 0.606 eV = 5.086 eV
Sensitivity_int := e_c/(u_ro_air*W_int) = 280.883 μC/(cm^2*Gy)
DE_1 := Sensitivity_eff/Sensitivity_int = 0.921046
# Conversion coefficient ("slope_s" parameter) also could be used further in noise analysis for another way of Detection Efficiency estimation.
# Noise analysis, DE, NED, DQE
E := 22 keV  # x-ray energy during measurement
μ_ρ_E_av := 10.16 keV*cm^2/gm  # product of x-ray energy and mass energy transfer coefficient in air for 60 keV
# Linear fit of the noise to dose dependence:
[intercept_n; slope_n] := line(Dose_noise, Noise^2)
intercept__n := Noise[0]^2
# correction of the intercept
# (to exclude the overestimation of NED)
N_D_fit(x) := intercept__n + slope_n*x
x_n := 0 μGy, 1 μGy .. 10^4 μGy  # dose range
# [chart]
    Y[1] := Noise^2/e_c^2
    X[1] := Dose_noise/10^-6
    X[2] := x_n/10^-6
    Y[2] := N_D_fit(x_n)/e_c^2
# Squared noise vs dose dependence
# photon to dose converting function:
μ_ρ_E_av*1 = 10160000 cm^2*eV/kg
D(n) := μ_ρ_E_av*n/detector_pixel_area
D(1) = 0.00406953 μGy
D(56523) = 0.000230022 Gy  # single photon dose
DE_2 := D(1)*slope_s^2/slope_n = 0.919228
# NED in photons
NED := intercept__n/slope_n = 1.7446e-9 Gy
NED_photon := NED/D(1) = 0.428697
# Detective Quantum Efficiency (DQE)
Dose_n := 0 μGy, 0.001*μGy .. 0.1 μGy  # dose range
DQE_D(D) := DE_2/(1 + NED/D)  # DQE dependence from the dose
# [chart]
    Y[1] := DQE_D(Dose_n)
    X[1] := Dose_n/10^-6
# Energy-dependent characteristics
# Cubic-spline fitting of X-ray linear attenuation coefficient vs. energy:
μ_MAPbI3(E) := interp(cspline(E_μ, μ), E_μ, μ, E)
E := 0, 0.1 .. E_μ[length(E_μ) - 1]
# Attenuation efficiency:
AE(E) := (1 - exp(-d*μ_MAPbI3(E)))
# [chart]
    X[1] := E
    Y[1] := AE(E)
    X[2] := E
    Y[2] := 0.5
# X-ray energy during measurement:
E_mes := 22  # keV
μ_mes := 131 cm^-1
AE_mes := (1 - exp(-d*μ_mes)) = 0.927197
DE_E(E) := DE_1*AE(E)/AE_mes
E_mes := 22
AE_50 := 52 keV
NED_E(E) := (E_mes/E)^2*AE_mes/AE(E)*NED_photon
# [chart]
    X[1] := E
    Y[1] := DE_E(E)
# [chart]
    X[1] := E
    Y[1] := NED_E(E)
n_ph := 1000  # dose of 10^3 photons
DQE_E(E, n_ph) := DE_E(E)/(1 + NED_E(E)/n_ph)
# [chart]
    Y[1] := DQE_E(E, 1)
    X[1] := E
    Y[2] := DQE_E(E, 10)
    X[2] := E
    Y[3] := DQE_E(E, 10^2)
    X[3] := E
# Timing detector characterization
t := 0 μs, 0.1 μs .. 300 μs
# [chart]
    Y[1] := TS
    X[1] := T/10^-6
    Y[2] := 0.1
    X[2] := t/10^-6
    X[3] := t/10^-6
    Y[3] := 0.9
# Transient of single-photon counting event
t_rise := 22 μs
f_3dB := 0.35/t_rise = 15909.1 Hz
# Array detector characterization
# [chart]
    X[1] := distance
    Y[1] := ESF
# Edge spread function (detector output)
# Linear spread function - derivative of the ESF(x)
i := 0, 1 .. length(ESF) - 2
LSF[i] := (ESF[i + 1] - ESF[i])/(distance[i + 1] - distance[i])
distance_LSF[i] := distance[i]
# Gaussian fitting:
# If regression doesn't converge, try to change "guess" parameters
guess := [100; 0.544; 0.01]
gauss(x, A, μ, σ) := A/(sqrt(2*π)*σ)*exp(-(x - μ)^2/(2*σ^2))
f(x, A, μ, σ) := [
    gauss(x, A, μ, σ);
    1/A*gauss(x, A, μ, σ);
    (x - μ)/σ^2*gauss(x, A, μ, σ);
    (x - μ)^2/σ^3*gauss(x, A, μ, σ)
]
ξ := 0, 0.005 .. 1.1
Results := genfit(distance_LSF, LSF, guess, f) = [91.3768; 0.496219; 0.0280607]
# [chart]
    X[1] := distance
    Y[1] := LSF
    X[2] := ξ
    Y[2] := gauss(ξ, Results[0], Results[1], Results[2])
# Modulation transfer function
# Upper and lower limits in the integral below should be set according to distance
# points where "step" is observed
OTF(ξ) := integral(gauss(x, Results[0], Results[1], Results[2])*exp(-1i*2*π*ξ*x), x = 0.4 .. 0.6)
MTF(ξ) := |OTF(ξ)|/|OTF(0)|
ξ := 0, 0.1 .. 11
# [chart]
    Y[1] := MTF(ξ)
    X[1] := ξ
    Y[2] := 0.2
    X[2] := ξ
f_20 := 10  # lp/mm
# Noise power spectrum (NPS)
# For a detector with single-photon  sensitivity (as it is seen from NED<1photon) the NPS is considered independent independents on spatial frequency, as for photon-counting detector(Proc SPIE Int Soc Opt Eng. 2017 Feb; 10132: 1013207.) and  normalized NPS is equal 1/DE (McMullan, G. et al. Electron imaging with Medipix2 hybrid pixel detector. Ultramicroscopy 107, 401–413 (2007).)
NNPS(f) := 1
# Detective Quantum Efficiency
# spatial frequency
u := 0*mm^-1, 0.1*mm^-1 .. 20*mm^-1
DQE(f) := DE_1*MTF(f/mm^-1)^2/NNPS(f)
DQE_th(f) := (sin(π*f*p)/(π*f*p))^2
# [chart]
    X[1] := u/mm^-1
    Y[1] := DQE(u)
    X[2] := u/mm^-1
    Y[2] := DQE_th(u)
n1 := (1 + sqrt(1 + 0.16*DE_1*NED_photon))/(0.08*DE_1*p^2*(f_20*mm^-1)^2) = 172.282
# Characterization Summary
# Detector parameters:
#
# Material: MAPbI3
# Geometry of readout channels: 1d strips array
# Conversion type: direct-conversion
# Detection mode: charge-integration
# Thickness: 200 um
# Pixel area: 40x1000 um^2
# Pixel pitch: 20 um
#
# X-ray beam conditions:
#
# Source:  Ag X-ray tube at 25 kVp
# Distance: 10 cm away from X-ray tube nozzle
# Spectrum: Quasi-monogenetic (mean 22 keV, width 2 keV)
# Detectors performance parameters:
# Noise equivalent dose:
NED = 1.7446e-9 Gy
NED_photon = 0.428697
# Detector efficiency:
DE_1 = 0.921046
DE_2 = 0.919228
# X-ray energy at 50% absorption efficiency:
AE_50 = 52 keV
# Rise time and cut-off frequency:
t_rise = 22 μs
f_3dB = 15909.1 Hz
# Spatial resolution:
f_20 = 10  # lp/mm
# Number of photons passing
# through the smallest resolvable
# feature to achieve SNR=1:
n1 = 172.282
