# If used, please cite: "-" (TBA)
# Kostiantyn Sakhatskiy,
# Vitalii Bartosh
# Kovalenko group
# D-CHAB, ETH Zurich
# Units & constants
eV := 1*V*e_c = 1.60218e-19 J  # conversion factor between Roentgen and Gray in air
keV := 10^3*eV
MeV := 10^6*eV
R := 0.00877 Gy
mGy := 10^-3*Gy
mR := 10^-3*R
μGy := 10^-6*Gy
au := ¤
signal_units := 1 au
arbitary_units := au
dose_units := mR
p := 70*μm  # pixel pitch
detector_pixel_area := 70*70 μm^2
d := 0.1 mm  # thickness of the active layer
# File input
# Averaged (baseline) signal values:
Signal := READFILE("./Signal_a_Se_ADU.txt", "delimited")*signal_units
# Corresponding to signal dose values:
Dose_signal := READFILE("./Dose_signal_a_Se_mR.txt", "delimited")*dose_units
# Noise RMS values:
Noise := READFILE("./Noise_a_Se_ADU.txt", "delimited")*signal_units
# Corresponding to noise dose values:
Dose_noise := READFILE("./Dose_noise_a_Se_ADU.txt", "delimited")*dose_units
# Linear attenuation coefficient in GOS:
μ := READFILE("./u_a_Se.txt", "delimited")*cm^-1
# Energies for μ dependency:
E_μ := READFILE("./u_energy_a_Se.txt", "delimited")
# Pixel coordinates (in mm):
distance := READFILE("./Distance_a_Se.txt", "delimited")
# Edge spread function (from partially closed detector array):
ESF := READFILE("./Signal_profile_a_Se.txt", "delimited")
# Noise values from the detector:
Noise_matrix := READPRN("./Noise_2D_a_Se.txt")
# Lateral size of area for noise evaluation
distance_noise := READFILE("./Noise_2D_a_Se_distance_side.txt", "delimited")
# Single pixel characterization
# Linear fit of the signal to dose dependence:
[intercept_s; slope_s] := line(Dose_signal, Signal)
# dose range
S_D_fit(x) := intercept_s + slope_s*x
x_s := 0 Gy, 0.001 Gy .. 0.04 Gy
# [chart]
    X[1] := Dose_signal*10^3
    Y[1] := Signal
    X[2] := x_s*10^3
    Y[2] := S_D_fit(x_s)
# Signal vs dose dependence
# Conversion coefficient ("slope_s" parameter) is used further in noise analysis for
# Detection Efficiency estimation.
# Detection Efficiency evaluation via comparison with sensitivity isn't applicable here, since ADU units conversion isn't known (for this case, not in general)
# Noise analysis, DE, NED, DQE
E := 19.2 keV  # Mean x-ray energy during measurement
μ_ρ_E_av := 19.2*0.54 keV*cm^2/gm  # product of x-ray energy and mass energy transfer coefficient in air, averaged on spectrum
# Linear fit of the noise to dose dependence:
[intercept_n; slope_n] := line(Dose_noise, Noise^2)
N_D_fit(x) := intercept_n + slope_n*x
x_n := 0 Gy, 0.001 Gy .. 0.032 Gy  # dose range
# [chart]
    Y[1] := Noise^2
    X[1] := Dose_noise*10^3
    X[2] := x_n*10^3
    Y[2] := N_D_fit(x_n)
# Squared noise vs dose dependence
# photon to dose converting function:
D(n) := μ_ρ_E_av*n/detector_pixel_area
D(1) = 0.0339007 μGy  # single photon dose
DE_2 := slope_s^2*D(1)/slope_n = 0.614958
intercept_n = 0.686649 base_currency^2
NED := intercept_n/slope_n = 0.409191 μGy
NED_photon := NED/D(1) = 12.0703
# Detective Quantum Efficiency (DQE)
Dose_n := 0 Gy, 0.0000001 Gy .. 0.00006 Gy  # dose range
DQE_D(D) := DE_2/(1 + NED/D)  # DQE dependence from the dose
# [chart]
    Y[1] := DQE_D(Dose_n)
    X[1] := Dose_n*10^3
# Energy-dependent characteristics
# Cubic-spline fitting of X-ray linear attenuation coefficient vs. energy:
μ_a_Se(E) := interp(cspline(E_μ, μ), E_μ, μ, E)
E := 0, 0.1 .. E_μ[length(E_μ) - 1]
# Attenuation efficiency:
AE(E) := (1 - exp(-d*μ_a_Se(E)))
# [chart]
    X[1] := E
    Y[1] := AE(E)
    X[2] := E
    Y[2] := 0.5
# X-ray energy during measurement:
E_mes := 19.2  # keV
μ_mes := 224 cm^-1
AE_mes := (1 - exp(-d*μ_mes)) = 0.893541
DE_E(E) := DE_2*AE(E)/AE_mes
E_mes := 19.2
AE_50 := 30 keV
NED_E(E) := (E_mes/E)^2*AE_mes/AE(E)*NED_photon
# [chart]
    X[1] := E
    Y[1] := DE_E(E)
# [chart]
    X[1] := E
    Y[1] := NED_E(E)
n_ph := D(10^6) = 33.9007 mGy  # dose of 10^6 photons
DQE_E(E, n_ph) := DE_E(E)/(1 + NED_E(E)/n_ph)
n_ph
# [chart]
    Y[1] := DQE_E(E, 10^2)
    X[1] := E
    Y[2] := DQE_E(E, 10^3)
    X[2] := E
    Y[3] := DQE_E(E, 10^4)
    X[3] := E
# Timing detector characterization
# For this case the detector speed is limited not by not a-Se but readout speed of imaging array, which is 3 frame per second, which mean
t_int := 0.3 s
# Using Eq. 13 and 16 it is possible to determine
t_rise := 0.7*t_int = 0.21 s
f_3dB := 0.35/t_rise = 1.66667 Hz
# [chart]
    X[1] := distance
    Y[1] := ESF
# Array detector characterization
# Edge spread function (detector output)
# Linear spread function - derivative of the ESF
i := 0, 1 .. length(ESF) - 2
LSF[i] := (ESF[i + 1] - ESF[i])/(distance[i + 1] - distance[i])
distance_LSF[i] := distance[i]
# Gaussian fitting:
# If regression doesn't converge, try to change "guess" parameters
guess := [100; 0.7; 0.2]
gauss(x, A, μ, σ) := A/(sqrt(2*π)*σ)*exp(-(x - μ)^2/(2*σ^2))
f(x, A, μ, σ) := [
    gauss(x, A, μ, σ);
    1/A*gauss(x, A, μ, σ);
    (x - μ)/σ^2*gauss(x, A, μ, σ);
    (x - μ)^2/σ^3*gauss(x, A, μ, σ)
]
Results := genfit(distance_LSF, LSF, guess, f) = [93.9454; 0.566461; 0.0404456]
ξ := 0, 0.01 .. 1.6
# [chart]
    X[1] := distance
    Y[1] := LSF
    X[2] := ξ
    Y[2] := gauss(ξ, Results[0], Results[1], Results[2])
# Modulation transfer function
# Upper and lower limits in the integral below should be set according to distance
# points where "step" is observed
OTF(ξ) := integral(gauss(x, Results[0], Results[1], Results[2])*exp(-1i*2*π*ξ*x), x = 0.4 .. 1)
MTF(ξ) := |OTF(ξ)|/|OTF(0)|
ξ := 0, 0.1 .. 10
# [chart]
    Y[1] := MTF(ξ)
    X[1] := ξ
    Y[2] := 0.2
    X[2] := ξ
# Spatial resolution
f_20 := 7  # lp/mm
# Noise power spectrum (NPS)
A := rows(Noise_matrix) = 32
B := cols(Noise_matrix) = 32  # size of matrix
# Mean value of the noise:
Noise_avereged := 1/(A*B)*sum(sum(Noise_matrix[x, y], y = 0 .. B - 1), x = 0 .. A - 1) = -0.309959
# NPS calculation for 32 detector rows:
NPS(f, point) := p/B*|sum((Noise_matrix - Noise_avereged)[point, x]*exp((-1i*2*π)*(f*x*p)), x = 0 .. B - 1)|^2
# spatial frequency
u := 0*mm^-1, 0.1*mm^-1 .. 10*mm^-1
NPS_av(f) := sum(NPS(f, i), i = 0 .. A - 1)/A
# [chart]
    X[1] := u/mm^-1
    Y[1] := NPS_av(u)
# Normalized NPS:
NNPS(f) := NPS_av(f)/NPS_av(0*mm^-1)
# Detective Quantum Efficiency
DQE(f) := DE_2*MTF(f/mm^-1)^2/NNPS(f)
DQE_th(f) := (sin(π*f*p)/(π*f*p))^2
# [chart]
    X[1] := u/mm^-1
    Y[1] := DQE(u)
    X[2] := u/mm^-1
    Y[2] := DQE_th(u)
# [chart]
    X[1] := u/mm^-1
    Y[1] := NNPS(u)
n1 := (1 + sqrt(1 + 0.16*DE_2*NED_photon))/(0.08*DE_2*p^2*(f_20*mm^-1)^2) = 209.875
# Characterization Summary
# Detector parameters:
#
# Material: a-Se
# Geometry of readout channels: 2d array
# Conversion type: direct-conversion
# Detection mode: charge-integration
# Thickness: 100 um
# Pixel area: 70x70 um^2
# Pixel pitch: 70 um
#
# X-ray beam conditions:
#
# Source:  W/Rh X-ray tube  with 3.95 cm Lucite at 28 kVp
# Distance: about 60 cm away from X-ray tube nozzle
# Spectrum: broad spectrum (mean 19.2 keV)
# Detectors performance parameters:
# Noise equivalent dose:
NED_photon = 12.0703
NED = 0.409191 μGy
# Detector efficiency:
DE_2 = 0.614958
# X-ray energy at 50% absorption efficiency:
AE_50 = 30 keV
# Rise time and cut-off frequency:
t_rise = 0.21 s
f_3dB = 1.66667 Hz
# Spatial resolution:
f_20 = 7  # lp/mm
# Number of photons passing
# through the smallest resolvable
# feature to achieve SNR=1:
n1 = 209.875
